LegCalibrationStudy RightCal1Hip(
  BodyModelRef=Main.HumanModel.BodyModel,
  Side=Right,
) = {
  nStep = NumElemOf(HipPositions);

  MuscleArr = ObjSearch(
    &..BodyModel.Right.Leg.Mus,
    {
      "AdductorMagnus*.*",
      "AdductorLong*.*",
      "AdductorBrevis*.*",
      "Pectineus.*",
      "Gracilis.*",
      "TensorFasciaeLatae.*",
    },
    "AnyMuscle"
  );

  RminMuscleFiber = repmat(NumElemOf(MuscleArr), .RValues.RMinDefault);
  RmaxMuscleFiber = repmat(NumElemOf(MuscleArr), .RValues.RMaxDefault);

  HipPositions = repmat(2,{
    &.RangeOfMotion.Right.Leg.Hip.InternallyRotated,
    &.RangeOfMotion.Right.Leg.Hip.Adduction,
    &.RangeOfMotion.Right.Leg.Hip.Abduction,
    &.RangeOfMotion.Right.Leg.Hip.AbductedAndExternallyRotated,
    &.RangeOfMotion.Right.Leg.Hip.FlexedAndAdducted,
    &.RangeOfMotion.Right.Leg.Hip.FlexedAndAbducted,
    &.RangeOfMotion.Right.Leg.Hip.ExtendedAndAdducted,
  });

  KneePositions = flatten({
    repmat(round(nStep/2), &.RangeOfMotion.Right.Leg.Knee.MaxFlexionAngle),
    repmat(round(nStep/2), &.RangeOfMotion.Right.Leg.Knee.MaxExtensionAngle)
  });
  AnklePositions = repmat(nStep, &.RangeOfMotion.Right.Leg.Ankle.Neutral);
  SubTalarPositions = repmat(nStep, &.RangeOfMotion.Right.Leg.Ankle.Neutral);
};


CalibrationSequence = {
  AnyOperation &LegCal1Right = .RightCal1Hip.FiberAndTendonLengthAdjustment;
};
